// SBML level 2 version 5

model superexample()
  // Example which includes different equations

  // Assignment rules:
  // csymbol time
  someFun2 := x + time;
  // csymbol delay
  someFun3 := k + delay(x, 0.1);
  // divide element and e-notation
  someFun := A + B/2e-2 + D;
  // trigonometry
  fff := sin(phi);
  // cn rational and integer
  fff := A*B*(1/50)*(5/200)*5*(-15);
  // sqrt, squarem, exp, power
  f := 1/sqrt(2*pi*sigma^2)*exp(x);
  // absolute((sss+12.4)*x)
  f := abs((sss + 12.4)*x);
  o1 := ln(x) + log10(x) + log(3, x);

  // Rate rules:
  // times
  S1' = k1*S2;

  // Algebraic rules:
  // times and negative integer
  0 = -1*k2 + S1 + S2;

  // Constraints:
  constraint (1 < S1) && (S1 > 100);  // Species S1 is out of range.
  constraint (1 < S1) || (S1 > 100);  // Species S1 is out of range.
  constraint (1 >= S1) == (S1 <= 100);  // Species S1 is out of range.
  constraint (1 >= S1) != (S1 <= 100);  // Species S1 is out of range.
end
