// SBML level 2 version 4
// This is a test SBML which includes all cominations of nodes and attributes.

// This is a test text element.
function multiply(x, y)
  x*y;
end
multiply is "multiply function";

model superexample()
  // Example which includes all structures and attributes
  // This is a test SBML which includes all cominations of nodes and attributes.

  // Compartments:
  // This is a test text element.
  compartment Total = 100 nd; Total is "Total volume";  // 1-D
  // This is a test text element.
  compartment comp1 in Total = 12 l; comp1 is "first compartment";
  // This is a test text element.
  compartment comp2 in Total = 4.2 xxx; comp2 is "second compartment";

  // Species:
  // This is a test text element.
  substanceOnly species $A in Total = 1.898501;  // substance in mmole
  species $B in comp1 = 1.490793/comp1;  // substance in mmole
  substanceOnly species C in comp2 = 1.300637*comp2;  // substance in mmole
  species $D in comp2 = 1.234049;
  species E in comp1 = 1.234049; E is "Some new";  // substance in mole

  // Parameters:
  // This is a test text element.
  k2 = 1.93148 mM_per_min; k2 is "constant of reaction";
  // This is a test text element.
  k3 = 0; k3 is "another constant of reaction";
  // This is a test text element.
  k3r = 0.15;
  k4 has uM_per_s;
  k4r = 0.001;
  v0_0 = ;

  // Initial assignments:
  k1 = y;

  // Assignment rules:
  // This example includes csymbol time
  someFun2 := x + time;
  // This example includes csymbol delay
  someFun3 := k + delay(x, 0.1);
  // This is a test text element.
  someFun := A + B/2 + D;

  // Rate rules:
  // This is a test text element.
  S1' = k1*S2;

  // Algebraic rules:
  // This is a test text element.
  0 = -1*k2 + S1 + S2;

  // Reactions:
  // This is a test text element.
  // This is a test text element.
  reaction_zero: => $A + 2 $B; v0_0;
  // This is a test text element.
  reaction_one: (k2*5) $A => 2 $B; k2*A;  // modifiers: C; fast
  // This is a test text element.
  reaction_two: 2 $B + $A -> 3 C; comp1*(reaction_two_k3*B - reaction_two_k3r*C);
    reaction_two_k2 = 0 mM/min; reaction_two_k3 = 1.738867; reaction_two_k3r = 0.15; reaction_two_k4r = 0.001; local_par = 0;
  // This is a test text element.
  reaction_three: 3 C -> ; comp2*(k4*C - k4r*D);  // modifiers: A; fast

  // Events:
  // This is a test text element.
  at (1.2) after (S4 > S2): S1 = 1/50, S4 = 1/200;  // event 1
  event_2: at (1.2) after (S4 > S2), fromTrigger=false: S4 = 1/200;
  event_3: at (1.2) after (S4 > S2): S1 = 1/50;
  event4: at (true): x1 = 12.2;
  event5: at (false): x1 = 12.2;
  event5: at (true && ((S4 > S2) || !false)): x1 = 12.2;

  // Constraints:
  constraint (1 < S1) && (S1 < 100);  // Species S1 is out of range.

  // Unit definitions:
  unit xyz = a * b * c * d * 100 e * 100 f * 1.3 g * 1.3 h;
  // This is a test text element.
  unit mM = 1e-3 mole / litre;
  // This is a test text element.
  unit pM = 1e-12 mole / litre;
  unit pmole = 1e-12 mole;
  unit l = litre;
  unit kcell_per_l = 1000 item / litre; kcell_per_l is "\frac{Kcell}{l}";
  unit celsium = kelvin; celsium is "celsium degrees";
end
